<?xml version="1.0" ?>


<!--<documentation>


    An early goal of this study was to determine the most
    fuel-efficient climb schedule for the SR-71 aircraft so that test time
    at the target test condition or the payload drag that could be accommodated
    to that condition would be maximized. This optimal
    schedule analysis focused on the transonic and higher speed range
    because the vehicle would be refueled at Mach 0.75 and an altitude
    of 25,000 ft (7620 m) soon after takeoff.
    After refueling, the SR-71 aircraft is normally piloted along a
    constant Mach 0.9 climb to approximately 33,000 ft (10,058 m),
    pushed over at a 3000 ft/min (914 m/min) descent to approximately
    30,000 ft (9144 m), and pulled out in a level acceleration to
    450    KEAS (Mach 1.25).
    This transonic penetration procedure is
    known as the climb-dive technique.
    At 450    KEAS    , the vehicle initiates
    a constant equivalent airspeed climb to Mach 2.6. At this
    Mach number, equivalent airspeed is slowly reduced until the vehicle
    reaches the design cruise condition (3.2 maximum Mach number
    and 85,000 ft (25,908 m) maximum altitude). The climb-dive
    technique was discovered by Redin in the early 1970s to use less
    fuel than level transonic acceleration at 25,000 ft (7620 m) uses.


        The SR-71 aircraft is powered by two 34,000 lbf (151,240 N)
        thrust-class J58 afterburning turbojet engines (fig. 5). Each engine
        contains a nine-stage compressor driven by a two-stage turbine.
        The main burner uses an eight-can combustor. The afterburner is
        fully modulating. The primary nozzle area is variable. Above
        Mach 2.2, some of the airflow is bled from the fourth stage of
        the compressor and dumped into the augmentor inlet through
        six bleed-bypass tubes, circumventing the core of the engine and
        transitioning the propulsive cycle from a pure turbojet to a
        turbo-ramjet. The engine is hydromechanically controlled and
        burns a special low volatility jet fuel mixture known as JP7.
        Some known data
        24000 34000  1800g/kg/kgp  4.57 kgp/kg  30000 liter/hour => 24000 kg => 52910 lbs/hour


</documentation>-->


    <turbine_engine name="J58_Engine">
  <milthrust> 250300 </milthrust>
  <maxthrust> 300000 </maxthrust>
  <bypassratio> 0.0 </bypassratio>
  <tsfc> 0.000000000001</tsfc>
  <atsfc> 0.046 </atsfc> <!--1.900-->
  <n1spinup>        100.7 </n1spinup>
  <n2spinup>        100.7 </n2spinup>
  <n1startrate>     100.0 </n1startrate>
  <n2startrate>     100.0 </n2startrate>
  <idlen1> 0.0 </idlen1>
  <idlen2> 0.0 </idlen2>

  <maxn1> 102.0 </maxn1>
  <maxn2> 106.0 </maxn2>
  <augmented> 1 </augmented>
  <augmethod> 2 </augmethod>
  <injected> 0 </injected>


  <function name="IdleThrust">
      <table>
          <independentVar lookup="row">velocities/mach</independentVar>
          <independentVar lookup="column">atmosphere/density-altitude</independentVar>
          <tableData>
              -10000     0     10000   20000   30000   40000   50000
              0.0  0.0430  0.0488  0.0528  0.0694  0.0899  0.1183  0.1467
              0.2  0.0500  0.0501  0.0335  0.0544  0.0797  0.1049  0.1342
              0.4  0.0040  0.0047  0.0020  0.0272  0.0595  0.0891  0.1203
              0.6  0.0     0.0     0.0     0.0     0.0276  0.0718  0.1073
              0.8  0.0     0.0     0.0     0.0     0.0474  0.0868  0.0900
              1.0  0.0     0.0     0.0     0.0     0.0     0.0552  0.0800
              8.0  0       0        0      0      0        0       0.08
              8.1  0       0        0      0      0        0       0 <!--No idle thrust in space!-->
          </tableData>
      </table>
  </function>

  <function name="MilThrust">
      <table>
          <independentVar lookup="row">velocities/mach</independentVar>
          <independentVar lookup="column">atmosphere/density-altitude</independentVar>
          <tableData>
              -10000       0   10000   20000   30000   40000   50000 60000
              0.0   0.01   0.01  0.7400  0.5340  0.3720  0.2410  0.1490 1
              0.2   0.01   0.01  0.6970  0.5060  0.3550  0.2310  0.1430 1
              0.4   0.01   0.01  0.6920  0.5060  0.3570  0.2330  0.1450 1
              0.6   0.01   0.01  0.7210  0.5320  0.3780  0.2480  0.1540 1
              0.8   0.01   0.01  0.7820  0.5820  0.4170  0.2750  0.1700 1
              1.0   0.01   0.01  0.8710  0.6510  0.4750  0.3150  0.1950 1
              1.2   0.01   0.01  0.9750  0.7440  0.5450  0.3640  0.2250 1
              1.4   0.01   0.01  1.0860  0.8450  0.6280  0.4240  0.2630 1
              1.6    1       1       1       1       1      1      1      1
          </tableData>
      </table>
  </function>
 <!-- extrapolated  from Concorde Olympus-->
<!-- with  coeff  X   applied to thrust value  Mach related

     1.0000	0.0
     1.0000	0.2
     1.0000	0.4
     1.0000	0.6
     1.0000	0.8
     1.0000	1.0
     1.2000	1.2
     1.4000	1.4
     1.6000	1.6
     1.7000	1.8
     1.8000	2.0
     1.9500	2.2
     2.1000	2.4
     2.2000	2.6
     2.2500	2.8
     2.2000	3.0
     2.1000	3.2
     -->
<!--There is an area of decrease thrust from Mach 1.05 to Mach 1.15-->
<!--Haha just kidding-->

  <function name="AugThrust">
      <table>
          <independentVar lookup="row">velocities/mach</independentVar>
          <independentVar lookup="column">atmosphere/density-altitude</independentVar>
          <independentVar lookup="table">fcs/intake-subsonic-pos</independentVar>
          <tableData breakPoint="0">
                    -10000	0	    10000	20000	30000	40000	50000	60000	70000	80000	90000
              0.00	1.1816	1.0000	0.8184	0.6627	0.5280	0.3756	0.2327	0.1280	0.0880	0.0550	0.2327
              0.20	1.1308	0.9599	0.7890	0.6406	0.5116	0.3645	0.2258	0.1242	0.0844	0.0528	0.2258
              0.40	1.1150	0.9474	0.7798	0.6340	0.5070	0.3615	0.2240	0.1232	0.0833	0.0521	0.2240
              0.60	1.1284	0.9589	0.7894	0.6420	0.5134	0.3661	0.2268	0.1247	0.0844	0.0527	0.2268
              0.80	1.1707	0.9942	0.8177	0.6647	0.5309	0.3784	0.2345	0.1290	0.0875	0.0547	0.2345
              1.00	1.2411	1.0529	0.8648	0.7017	0.5596	0.3983	0.2467	0.1357	0.0926	0.0579	0.2467
              1.20	1.5944	1.3505	1.1065	0.8954	0.7123	0.5063	0.3137	0.1726	0.1188	0.0743	0.3137
              1.40	2.1548	1.8224	1.4900	1.2032	0.9540	0.6764	0.4191	0.2307	0.1604	0.1002	0.4191
              1.60	2.6709	2.2542	1.8375	1.4790	1.1686	0.8262	0.5119	0.2815	0.1984	0.1239	0.5119
              1.80	3.1142	2.6242	2.1343	1.7122	1.3491	0.9520	0.5899	0.3244	0.2309	0.1444	0.5899
              2.00	3.4797	2.9830	2.4863	1.9901	1.5610	1.0993	0.6812	0.3747	0.2626	0.1640	0.6812
              2.20	3.9400	3.3800	2.8200	2.4800	1.8200	1.2718	0.7880	0.4334	0.2974	0.1858	0.7880
              2.40	4.5540	3.9600	3.3660	2.9480	2.2000	1.5840	1.0120	0.5566	0.3485	0.2178	1.0120
              2.60	5.2800	4.6080	3.9360	3.4560	2.6400	1.9200	1.2480	0.6864	0.4054	0.2534	1.2480
              2.80	0.1000	0.1000	0.1000	0.1000	0.1000	0.1000	1.3455	0.7526	0.4066	0.2527	1.3455
              3.00	0.1000	0.1000	0.1000	0.1000	0.1000	0.1000	1.4786	0.8271	0.4156	0.2535	1.4786
              3.20	0.1000	0.1000	0.1000	0.1000	0.1000	0.1000	1.6211	0.9069	0.4241	0.2560	1.6211
              3.40	0.1000	0.1000	0.1000	0.1000	0.1000	0.1000	1.7030	0.9984	0.4428	0.2595	1.7030
			  3.60  0.1000  0.01000  0.01000  0.01000  0.01000  1.7500  1.7540  1.0296  0.4687  0.2653  1.7540

          </tableData>

          <!--Basic data without coeff X-->
		  <!--Not used currently-->
          <tableData breakPoint="1">
                        -10000	0	       10000	20000	30000	40000	50000	60000	70000	80000      90000
              0.0	1.1816	1.0000	0.8184	0.6627	0.5280	0.3756	0.2327	0.1280	0.0880	0.0550     1.0010
              0.2	1.1308	0.9599	0.7890	0.6406	0.5116	0.3645	0.2258	0.1242	0.0844	0.0528     1.0010
              0.4	1.1150	0.9474	0.7798	0.6340	0.5070	0.3615	0.2240	0.1232	0.0833	0.0521     1.0010
              0.6	1.1284	0.9589	0.7894	0.6420	0.5134	0.3661	0.2268	0.1247	0.0844	0.0527     1.0010
              0.8	1.1707	0.9942	0.8177	0.6647	0.5309	0.3784	0.2345	0.1290	0.0875	0.0547     1.0010
              1.00	1.2411	1.0529	0.8648	0.7017	0.5596	0.3983	0.2467	0.1357	0.0926	0.0579	   1.0290
              1.2	1.3287	1.1254	0.9221	0.7462	0.5936	0.4219	0.2614	0.1438	0.0990	0.0619     1.0010
              1.4	1.4365	1.2149	0.9933	0.8021	0.6360	0.4509	0.2794	0.1538	0.1069	0.0668     1.0010
              1.6	1.5711	1.3260	1.0809	0.8700	0.6874	0.4860	0.3011	0.1656	0.1167	0.0729     1.0010
              1.8	1.7301	1.4579	1.1857	0.9512	0.7495	0.5289	0.3277	0.1802	0.1283	0.0802     1.0010
              2.0	1.8314	1.5700	1.3086	1.0474	0.8216	0.5786	0.3585	0.1972	0.1382	0.0863     1.0010
              2.2	1.9700	1.6900	1.4100	1.2400	0.9100	0.6359	0.3940	0.2167	0.1487	0.0929     1.0010
              2.4	2.0700	1.8000	1.5300	1.3400	1.0000	0.7200	0.4600	0.2530	0.1584	0.0990     1.0010
              2.6	2.2000	1.9200	1.6400	1.4400	1.1000	0.8000	0.5200	0.2860	0.1689	0.1056     1.0010
              2.8	0.1000	0.1000	0.1000	0.1000	0.1000	0.1000	0.5980	0.3345	0.1807	0.1123     1.0010
              3.0	0.1000	0.1000	0.1000	0.1000	0.1000	0.1000	0.1000	0.3847	0.1933	0.1179     1.0010
              3.2	0.1000	0.1000	0.1000	0.1000	0.1000	0.1000	0.1000	0.1000	0.1000	0.0100     1.0010

          </tableData>


      </table>
</function>


</turbine_engine>
